R_1 := 1 MΩ
R_2 := 330 kΩ
k := 16*10^-21 W/Hz
R_filter := 1 kΩ
R4 := 1 kΩ
R3 := 5 kΩ
R_5 := 1 MΩ
R_12 := (R_1^-1 + R_2^-1)^-1 = 248.12 kΩ
R_12tæthed := sqrt(k*R_12) = 63.0073 nV/sqrt(Hz)
R3_tæthed := sqrt(k*R3) = 8.94427 nV/sqrt(Hz)
R4_tæthed := sqrt(k*R4) = 4 nV/sqrt(Hz)
e_n := 16*nV/sqrt(Hz)
e_n1 := 0.2*sqrt(e_n^2 + R3_tæthed^2 + R_12tæthed^2) = 13.1239 nV/sqrt(Hz)
e_tæthed := sqrt(e_n^2 + R4_tæthed^2 + e_n1^2) = 21.0769 nV/sqrt(Hz)
# kravtil filter: Skal være en tredje del af etæthed
Filter_krav := e_tæthed/3 = 7.02564 nV/sqrt(Hz)
